*Heading
** Job name: Jobcrashboxtesr Model name: Model-1
** Generated by: Abaqus/CAE Learning Edition 2025
*Preprint, echo=NO, model=NO, history=NO, contact=NO
**
** PARTS
**
*Part, name=crashbox
*End Part
**
*Part, name=wall
*End Part
**
**
** ASSEMBLY
**
*Assembly, name=Assembly
**
*Instance, name=crashbox-1, part=crashbox
*Node
      1,       -13.75,         -10.,         150.
      2,       -13.75,          15.,         150.
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*Element, type=S4R
  1,   1,   9, 157,  74
  2,   9,  10, 158, 157
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*Nset, nset=Set-1, generate
   1,  620,    1
*Elset, elset=Set-1, generate
   1,  600,    1
** Section: boxsection
*Shell Section, elset=Set-1, material=aluminium
  1., 5
*End Instance
**
*Instance, name=wall-1, part=wall
         20.,          10.,           0.
*Node
      1,       -71.25,        -32.5,           0.
      2,       -66.25,        -32.5,           0.
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*Element, type=R3D4
  1,   1,   2,  13,  12
  2,   2,   3,  14,  13
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*End Instance
**
*Instance, name=wall-2, part=wall
         20.,          10.,         150.
*Node
      1,       -71.25,        -32.5,           0.
      2,       -66.25,        -32.5,           0.
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*Element, type=R3D4
  1,   1,   2,  13,  12
  2,   2,   3,  14,  13
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*End Instance
**
*Node
      1,       -26.25,          2.5,         150.
*Node
      2,       -26.25,          2.5,           0.
*Nset, nset=Set-7
 1,
*Nset, nset=Set-8
 2,
*Nset, nset=Set-9
 1,
*Nset, nset=Set-bottom, instance=crashbox-1
   1,   2,   5,   7,   9,  10
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*Nset, nset=Set-top, instance=crashbox-1
   1,   2,   5,   7,   9,  10
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*Nset, nset=b_Set-3, instance=wall-2, generate
   1,  121,    1
*Elset, elset=b_Set-3, instance=wall-2, generate
   1,  100,    1
*Nset, nset=b_Set-5, instance=wall-1, generate
   1,  121,    1
*Elset, elset=b_Set-5, instance=wall-1, generate
   1,  100,    1
*Nset, nset=_PickedSet24, internal
 1,
*Nset, nset=_PickedSet26, internal
 2,
*Elset, elset=_m_Surf-1_SPOS, internal, instance=wall-1, generate
   1,  100,    1
*Surface, type=ELEMENT, name=m_Surf-1
  _m_Surf-1_SPOS, SPOS
*Elset, elset=_m_Surf-2_SPOS, internal, instance=wall-1, generate
   1,  100,    1
*Surface, type=ELEMENT, name=m_Surf-2
  _m_Surf-2_SPOS, SPOS
*Elset, elset=_m_Surf-3_SNEG, internal, instance=wall-2, generate
   1,  100,    1
*Surface, type=ELEMENT, name=m_Surf-3
  _m_Surf-3_SNEG, SNEG
*Surface, type=NODE, name=Set-bottom_CNS_, internal
  Set-bottom, 1.
*Surface, type=NODE, name=Set-top_CNS_, internal
  Set-top, 1.
** Constraint: Constraint-3
*Rigid Body, ref node=_PickedSet24, elset=b_Set-3
** Constraint: Constraint-4
*Rigid Body, ref node=_PickedSet26, elset=b_Set-5
** Constraint: Constraint-bottom
*Tie, name=Constraint-bottom, adjust=no, no rotation
  Set-bottom_CNS_, m_Surf-2
** Constraint: Constraint-top
*Tie, name=Constraint-top, adjust=no, no rotation
  Set-top_CNS_, m_Surf-3
*Element, type=MASS, elset=Set-7_Inertia-mass100_
  1, 1
*Mass, elset=Set-7_Inertia-mass100_
  100.,
*End Assembly
*Amplitude, name=Amp-1
             0.,              0.,            0.07,              1.
**
** MATERIALS
**
*Material, name=aluminium
*Density
 2.9e-06,
*Elastic
  69000., 0.29
*Plastic
  120.,   0.
  160., 0.05
  200., 0.07
  220.,  0.1
  240., 0.15
**
** INTERACTION PROPERTIES
**
*Surface Interaction, name=IntProp-friction
*Friction
 0.2,
*Surface Behavior, pressure-overclosure=HARD
** ----------------------------------------------------------------
**
** STEP: Step-1
**
*Step, name=Step-1, nlgeom=YES
*Dynamic, Explicit
  , 0.07
*Bulk Viscosity
  0.06, 1.2
**
** BOUNDARY CONDITIONS
**
** Name: BC-1 Type: Symmetry/Antisymmetry/Encastre
*Boundary
  Set-8, ENCASTRE
** Name: BC-2 Type: Displacement/Rotation
*Boundary, amplitude=Amp-1
  Set-9, 3, 3, -75.
**
** INTERACTIONS
**
** Interaction: Int-1
*Contact, op=NEW
*Contact Inclusions, ALL EXTERIOR
*Contact Property Assignment
 ,  , IntProp-friction
**
** OUTPUT REQUESTS
**
*Restart, write, number interval=1, time marks=NO
**
** FIELD OUTPUT: F-Output-1
**
*Output, field, variable=PRESELECT
**
** HISTORY OUTPUT: H-Output-1
**
*Output, history, variable=PRESELECT
*End Step
